*Heading
** Job name: 800 Model name: 800
** Generated by: Abaqus/CAE 6.14-5
*Preprint, echo=NO, model=NO, history=NO, contact=NO
**
** PARTS
**
*Part, name=Boden
*Node
      1,       -10.75,         -15.,           0.
      2,          60.,         -15.,           0.
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*Element, type=SC8R
  1,  73,  71,  31,  30, 384, 382, 342, 341
  2,  27, 224, 223,  26, 338, 535, 534, 337
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*Elset, elset=_Oben_S2, internal, generate
   1,  275,    1
*Surface, type=ELEMENT, name=Oben
_Oben_S2, S2
*Elset, elset=_Unten_S1, internal, generate
   1,  275,    1
*Surface, type=ELEMENT, name=Unten
_Unten_S1, S1
** Region: (Deckschicht-1: Generated From Layup)
*Elset, elset=Deckschicht-1, generate
   1,  275,    1
** Section: Deckschicht-1
*Shell Section, elset=Deckschicht-1, composite, stack direction=3, layup=Deckschicht
0.125, 3, CFK, 0., 1
0.125, 3, CFK, 90., 2
0.125, 3, CFK, 0., 3
0.125, 3, CFK, 90., 4
0.125, 3, CFK, 90., 5
0.125, 3, CFK, 0., 6
0.125, 3, CFK, 90., 7
0.125, 3, CFK, 0., 8
*End Part
**
*Part, name=Deckel
*Node
      1,       -10.75,         -15.,           0.
      2,          60.,         -15.,           0.
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*Element, type=SC8R
  1,  73,  71,  31,  30, 384, 382, 342, 341
  2,  27, 224, 223,  26, 338, 535, 534, 337
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*Elset, elset=_Oben_S2, internal, generate
   1,  275,    1
*Surface, type=ELEMENT, name=Oben
_Oben_S2, S2
*Elset, elset=_Unten_S1, internal, generate
   1,  275,    1
*Surface, type=ELEMENT, name=Unten
_Unten_S1, S1
** Region: (Deckschicht-1: Generated From Layup)
*Elset, elset=Deckschicht-1, generate
   1,  275,    1
** Section: Deckschicht-1
*Shell Section, elset=Deckschicht-1, composite, stack direction=3, layup=Deckschicht
0.125, 3, CFK, 0., 1
0.125, 3, CFK, 90., 2
0.125, 3, CFK, 0., 3
0.125, 3, CFK, 90., 4
0.125, 3, CFK, 90., 5
0.125, 3, CFK, 0., 6
0.125, 3, CFK, 90., 7
0.125, 3, CFK, 0., 8
*End Part
**
*Part, name=Hantel
*Node
      1,           0.,          10.,         4.25
      2,           0.,          12.,         4.25
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*Element, type=C3D20R
  1,  67,  68,  79,  78,   1,   2,  13,  12, 268, 267, 266, 265, 269, 270, 271,
     272, 274, 273, 275, 276
  2,  68,  69,  80,  79,   2,   3,  14,  13, 279, 278, 277, 267, 280, 281, 282,
     270, 273, 283, 284, 275
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*Nset, nset=_PickedSet3, internal, generate
   1,  922,    1
*Elset, elset=_PickedSet3, internal, generate
   1,  150,    1
*Elset, elset=_Alles_S1, internal, generate
 101,  150,    1
*Elset, elset=_Alles_S6, internal, generate
   1,  141,   10
*Elset, elset=_Alles_S2, internal, generate
  1,  50,   1
*Elset, elset=_Alles_S4, internal, generate
  10,  150,   10
*Elset, elset=_Alles_S3, internal
   1,   2,   3,   4,   5,   6
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*Elset, elset=_Alles_S5, internal
  41,  42,  43,  44,  45,  46
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*Surface, type=ELEMENT, name=Alles
_Alles_S1, S1
_Alles_S6, S6
_Alles_S2, S2
_Alles_S4, S4
_Alles_S3, S3
_Alles_S5, S5
** Section: HarzSection
*Solid Section, elset=_PickedSet3, material=Harz
,
*End Part
**
*Part, name=Insert
*Node
      1,           0.,          20.,         4.25
      2,           0.,          20.,          15.
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*Element, type=C3D20R
 1,  34,  80, 133,  72,   1,  13,  64,  22, 175, 174, 173, 172, 176, 177, 178,
    179, 181, 180, 182, 183
 2,  80,  36,  76, 133,  13,   2,  14,  64, 186, 185, 184, 174, 187, 188, 189,
    177, 180, 190, 191, 182
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*Node
    589,           0.,          60.,           0.
*Nset, nset=Insert-RefPt_, internal
589,
*Nset, nset=_PickedSet5, internal, generate
   1,  588,    1
*Elset, elset=_PickedSet5, internal, generate
  1,  92,   1
*Nset, nset=Referenzpunkt
 589,
*Elset, elset=_Platte_S1, internal, generate
 11,  29,   1
*Elset, elset=_Platte_S2, internal, generate
  1,  10,   1
*Elset, elset=_Platte_S4, internal, generate
  2,  20,   2
*Surface, type=ELEMENT, name=Platte
_Platte_S1, S1
_Platte_S2, S2
_Platte_S4, S4
*Elset, elset=_Stiel_S3, internal
 39, 42, 46, 48, 51, 55
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*Elset, elset=_Stiel_S5, internal
 43, 47, 52, 56, 61, 65, 70, 74, 79, 83, 88, 92
*Surface, type=ELEMENT, name=Stiel
_Stiel_S3, S3
_Stiel_S5, S5
** Section: StahlSection
*Solid Section, elset=_PickedSet5, material=Stahl
,
*End Part
**
*Part, name=Niederhalter
*Node
      1,           5.,       -16.25,           0.
      2,         17.5,       -16.25,           0.
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*Element, type=C3D20R
 1,  19,   3,   1,   2,  52,  36,  34,  35,  70,  69,  68,  67,  71,  72,  73,
     74,  76,  75,  77,  78
 2,  27,  31,  20,  21,  60,  64,  53,  54,  82,  81,  80,  79,  83,  84,  85,
     86,  88,  87,  89,  90
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*Nset, nset=_PickedSet3, internal, generate
   1,  205,    1
*Elset, elset=_PickedSet3, internal, generate
  1,  21,   1
*Elset, elset=_Unten_S4, internal
  1,  8, 11, 14, 17
*Elset, elset=_Unten_S3, internal
  3,  4,  7, 10, 13
*Elset, elset=_Unten_S6, internal
  1,  6,  7,  8,  9, 12
*Elset, elset=_Unten_S5, internal
  1,  2,  7,  9, 15, 18
*Elset, elset=_Unten_S1, internal, generate
  1,  21,   1
*Surface, type=ELEMENT, name=Unten
_Unten_S4, S4
_Unten_S3, S3
_Unten_S6, S6
_Unten_S5, S5
_Unten_S1, S1
** Section: StahlSection
*Solid Section, elset=_PickedSet3, material=Stahl
,
*End Part
**
*Part, name=Schaum
*Node
      1,         -7.5,          -5.,           0.
      2,         -7.5,          -5.,          20.
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*Element, type=C3D20R
 1,  113,  118,   15,   14,  416,  421,  137,  138,  678,  677,  676,  675,  679,  680,  681,
     682,  684,  683,  685,  686
 2,   16,  111,  117,   17,  136,  414,  420,  135,  690,  689,  688,  687,  691,  692,  693,
     694,  696,  695,  697,  698
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*Nset, nset=_PickedSet4, internal, generate
    1,  2442,     1
*Elset, elset=_PickedSet4, internal, generate
   1,  448,    1
*Elset, elset=_Alles_S5, internal
  1, 14, 16, 17, 30, 32, 33, 46, 48, 49, 62, 64, 65, 78, 80
*Elset, elset=_Alles_S6, internal
  2,  3, 10, 18, 19, 26, 34, 35, 42, 50, 51, 58, 66, 67, 74
*Elset, elset=_Alles_S4, internal, generate
  6,  70,  16
*Elset, elset=_Alles_S3, internal
  7, 11, 12, 23, 27, 28, 39, 43, 44, 55, 59, 60, 71, 75, 76
*Elset, elset=_Alles_S1, internal, generate
  81,  172,    1
*Elset, elset=_Alles_S2, internal, generate
 357,  448,    1
*Surface, type=ELEMENT, name=Alles
_Alles_S5, S5
_Alles_S6, S6
_Alles_S4, S4
_Alles_S2, S2
_Alles_S3, S3
_Alles_S1, S1
** Section: SchaumSection
*Solid Section, elset=_PickedSet4, material=Schaum
,
*End Part
**
**
** ASSEMBLY
**
*Assembly, name=Assembly
**
*Instance, name=Insert-1, part=Insert
*End Instance
**
*Instance, name=Boden-1, part=Boden
         15.,          20.,          15.
         15.,          20.,          15., 14.422649720448, 19.422649720448, 14.422649720448, 119.999999109416
*End Instance
**
*Instance, name=Hantel-1, part=Hantel
 -8.88178419700125e-15,         12.7,  3.28280786928032e-15
*End Instance
**
*Instance, name=Schaum-1, part=Schaum
        22.5,         42.7,           5.
        22.5,         42.7,           5.,         23.5,         42.7,           5.,          90.
*End Instance
**
*Instance, name=Deckel-1, part=Deckel
         15.,         42.7,          15.
         15.,         42.7,          15., 15.577350279552, 43.277350279552, 15.577350279552, 240.000000890584
*End Instance
**
*Instance, name=Niederhalter-1, part=Niederhalter
       16.25,         45.4,         57.5
       16.25,         45.4,         57.5, 16.827350279552, 45.977350279552, 58.077350279552, 240.000000890584
*End Instance
**
*Nset, nset=XSYMM, instance=Insert-1
   1,   2,   5,   8,   9,  10
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*Nset, nset=XSYMM, instance=Boden-1
   1,   2,   8,   9,  10,  11
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*Nset, nset=XSYMM, instance=Hantel-1
   1,   2,   3,   4,   5,   6
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*Nset, nset=XSYMM, instance=Deckel-1
   1,   2,   8,   9,  10,  11
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*Nset, nset=XSYMM, instance=Schaum-1
    3,    4,    5,   10,   31,   32
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*Elset, elset=XSYMM, instance=Insert-1
  1,  2, 11, 12, 23, 25
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*Elset, elset=XSYMM, instance=Boden-1
   2,   3,   6,   9,  11,  12
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*Elset, elset=XSYMM, instance=Hantel-1
   1,   2,   3,   4,   5,   6
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*Elset, elset=XSYMM, instance=Deckel-1
   2,   3,   6,   9,  11,  12
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*Elset, elset=XSYMM, instance=Schaum-1
  65,  66,  67,  68,  69,  70
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*Nset, nset=YSYMM, instance=Insert-1
   3,   4,   6,   7,   9,  10
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*Nset, nset=YSYMM, instance=Boden-1
   5,   6,  35,  36,  37,  38
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*Nset, nset=YSYMM, instance=Hantel-1
  56,  57,  58,  59,  60,  61
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*Nset, nset=YSYMM, instance=Deckel-1
   5,   6,  35,  36,  37,  38
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*Nset, nset=YSYMM, instance=Schaum-1
    1,    2,    7,    8,   11,   12
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*Elset, elset=YSYMM, instance=Insert-1
  9, 10, 19, 20, 26, 28
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*Nset, nset=_PickedSet26, internal, instance=Niederhalter-1
  34,  35,  36,  37,  38,  39
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*Elset, elset=_PickedSet26, internal, instance=Niederhalter-1, generate
  1,  21,   1
*Nset, nset=_PickedSet30, internal, instance=Insert-1
 589,
*Nset, nset=_PickedSet31, internal, instance=Insert-1
 589,
*Elset, elset=_CP-1-Boden-1_S5, internal, instance=Boden-1
  1,  6,  7, 27
*Elset, elset=_CP-1-Boden-1_S3, internal, instance=Boden-1
  4, 24, 25, 28
*Elset, elset=_CP-1-Boden-1_S6, internal, instance=Boden-1
 29, 30
*Surface, type=ELEMENT, name=CP-1-Boden-1
_CP-1-Boden-1_S5, S5
_CP-1-Boden-1_S3, S3
_CP-1-Boden-1_S6, S6
*Elset, elset=_CP-1-Insert-1_S3, internal, instance=Insert-1
 39, 42, 46, 48, 51, 55
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*Elset, elset=_CP-1-Insert-1_S5, internal, instance=Insert-1
 43, 47, 52, 56, 61, 65, 70, 74, 79, 83, 88, 92
*Surface, type=ELEMENT, name=CP-1-Insert-1
_CP-1-Insert-1_S3, S3
_CP-1-Insert-1_S5, S5
*Elset, elset=_CP-2-Boden-1_S1, internal, instance=Boden-1, generate
   1,  275,    1
*Surface, type=ELEMENT, name=CP-2-Boden-1
_CP-2-Boden-1_S1, S1
*Elset, elset=_CP-2-Insert-1_S2, internal, instance=Insert-1, generate
  1,  10,   1
*Surface, type=ELEMENT, name=CP-2-Insert-1
_CP-2-Insert-1_S2, S2
*Elset, elset=_CP-3-Hantel-1_S2, internal, instance=Hantel-1, generate
  1,  50,   1
*Surface, type=ELEMENT, name=CP-3-Hantel-1
_CP-3-Hantel-1_S2, S2
*Elset, elset=_CP-3-Insert-1_S3, internal, instance=Insert-1
 39, 42, 46, 48, 51, 55
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*Elset, elset=_CP-3-Insert-1_S5, internal, instance=Insert-1
 43, 47, 52, 56, 61, 65, 70, 74, 79, 83, 88, 92
*Surface, type=ELEMENT, name=CP-3-Insert-1
_CP-3-Insert-1_S3, S3
_CP-3-Insert-1_S5, S5
*Elset, elset=_CP-4-Deckel-1_S5, internal, instance=Deckel-1
  1,  6,  7, 27
*Elset, elset=_CP-4-Deckel-1_S3, internal, instance=Deckel-1
  4, 24, 25, 28
*Elset, elset=_CP-4-Deckel-1_S6, internal, instance=Deckel-1
 29, 30
*Surface, type=ELEMENT, name=CP-4-Deckel-1
_CP-4-Deckel-1_S5, S5
_CP-4-Deckel-1_S3, S3
_CP-4-Deckel-1_S6, S6
*Elset, elset=_CP-4-Insert-1_S3, internal, instance=Insert-1
 39, 42, 46, 48, 51, 55
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*Elset, elset=_CP-4-Insert-1_S5, internal, instance=Insert-1
 43, 47, 52, 56, 61, 65, 70, 74, 79, 83, 88, 92
*Surface, type=ELEMENT, name=CP-4-Insert-1
_CP-4-Insert-1_S3, S3
_CP-4-Insert-1_S5, S5
*Elset, elset=_CP-5-Boden-1_S2, internal, instance=Boden-1, generate
   1,  275,    1
*Surface, type=ELEMENT, name=CP-5-Boden-1
_CP-5-Boden-1_S2, S2
*Elset, elset=_CP-5-Hantel-1_S6, internal, instance=Hantel-1, generate
   1,  141,   10
*Surface, type=ELEMENT, name=CP-5-Hantel-1
_CP-5-Hantel-1_S6, S6
*Elset, elset=_CP-6-Boden-1_S2, internal, instance=Boden-1, generate
   1,  275,    1
*Surface, type=ELEMENT, name=CP-6-Boden-1
_CP-6-Boden-1_S2, S2
*Elset, elset=_CP-6-Schaum-1_S5, internal, instance=Schaum-1
  1, 14, 16, 17, 30, 32, 33, 46, 48, 49, 62, 64, 65, 78, 80
*Elset, elset=_CP-6-Schaum-1_S6, internal, instance=Schaum-1
  2,  3, 10, 18, 19, 26, 34, 35, 42, 50, 51, 58, 66, 67, 74
*Elset, elset=_CP-6-Schaum-1_S4, internal, instance=Schaum-1, generate
  6,  70,  16
*Elset, elset=_CP-6-Schaum-1_S3, internal, instance=Schaum-1
  7, 11, 12, 23, 27, 28, 39, 43, 44, 55, 59, 60, 71, 75, 76
*Elset, elset=_CP-6-Schaum-1_S1, internal, instance=Schaum-1, generate
  81,  172,    1
*Elset, elset=_CP-6-Schaum-1_S2, internal, instance=Schaum-1, generate
 357,  448,    1
*Surface, type=ELEMENT, name=CP-6-Schaum-1
_CP-6-Schaum-1_S5, S5
_CP-6-Schaum-1_S6, S6
_CP-6-Schaum-1_S4, S4
_CP-6-Schaum-1_S2, S2
_CP-6-Schaum-1_S3, S3
_CP-6-Schaum-1_S1, S1
*Elset, elset=_CP-7-Hantel-1_S1, internal, instance=Hantel-1, generate
 101,  150,    1
*Surface, type=ELEMENT, name=CP-7-Hantel-1
_CP-7-Hantel-1_S1, S1
*Elset, elset=_CP-7-Schaum-1_S5, internal, instance=Schaum-1
  1, 14, 16, 17, 30, 32, 33, 46, 48, 49, 62, 64, 65, 78, 80
*Elset, elset=_CP-7-Schaum-1_S6, internal, instance=Schaum-1
  2,  3, 10, 18, 19, 26, 34, 35, 42, 50, 51, 58, 66, 67, 74
*Elset, elset=_CP-7-Schaum-1_S4, internal, instance=Schaum-1, generate
  6,  70,  16
*Elset, elset=_CP-7-Schaum-1_S3, internal, instance=Schaum-1
  7, 11, 12, 23, 27, 28, 39, 43, 44, 55, 59, 60, 71, 75, 76
*Elset, elset=_CP-7-Schaum-1_S1, internal, instance=Schaum-1, generate
  81,  172,    1
*Elset, elset=_CP-7-Schaum-1_S2, internal, instance=Schaum-1, generate
 357,  448,    1
*Surface, type=ELEMENT, name=CP-7-Schaum-1
_CP-7-Schaum-1_S5, S5
_CP-7-Schaum-1_S6, S6
_CP-7-Schaum-1_S4, S4
_CP-7-Schaum-1_S2, S2
_CP-7-Schaum-1_S3, S3
_CP-7-Schaum-1_S1, S1
*Elset, elset=_CP-8-Deckel-1_S1, internal, instance=Deckel-1, generate
   1,  275,    1
*Surface, type=ELEMENT, name=CP-8-Deckel-1
_CP-8-Deckel-1_S1, S1
*Elset, elset=_CP-8-Hantel-1_S4, internal, instance=Hantel-1, generate
  10,  150,   10
*Surface, type=ELEMENT, name=CP-8-Hantel-1
_CP-8-Hantel-1_S4, S4
*Elset, elset=_CP-9-Deckel-1_S1, internal, instance=Deckel-1, generate
   1,  275,    1
*Surface, type=ELEMENT, name=CP-9-Deckel-1
_CP-9-Deckel-1_S1, S1
*Elset, elset=_CP-9-Schaum-1_S5, internal, instance=Schaum-1
  1, 14, 16, 17, 30, 32, 33, 46, 48, 49, 62, 64, 65, 78, 80
*Elset, elset=_CP-9-Schaum-1_S6, internal, instance=Schaum-1
  2,  3, 10, 18, 19, 26, 34, 35, 42, 50, 51, 58, 66, 67, 74
*Elset, elset=_CP-9-Schaum-1_S4, internal, instance=Schaum-1, generate
  6,  70,  16
*Elset, elset=_CP-9-Schaum-1_S3, internal, instance=Schaum-1
  7, 11, 12, 23, 27, 28, 39, 43, 44, 55, 59, 60, 71, 75, 76
*Elset, elset=_CP-9-Schaum-1_S1, internal, instance=Schaum-1, generate
  81,  172,    1
*Elset, elset=_CP-9-Schaum-1_S2, internal, instance=Schaum-1, generate
 357,  448,    1
*Surface, type=ELEMENT, name=CP-9-Schaum-1
_CP-9-Schaum-1_S5, S5
_CP-9-Schaum-1_S6, S6
_CP-9-Schaum-1_S4, S4
_CP-9-Schaum-1_S2, S2
_CP-9-Schaum-1_S3, S3
_CP-9-Schaum-1_S1, S1
*Elset, elset=_CP-10-Deckel-1_S2, internal, instance=Deckel-1, generate
   1,  275,    1
*Surface, type=ELEMENT, name=CP-10-Deckel-1
_CP-10-Deckel-1_S2, S2
*Elset, elset=_CP-10-Niederhalter-1_S1, internal, instance=Niederhalter-1, generate
  1,  21,   1
*Surface, type=ELEMENT, name=CP-10-Niederhalter-1
_CP-10-Niederhalter-1_S1, S1
*Elset, elset=_Insertschaftklebeflaeche_S5, internal, instance=Boden-1
  1,  6,  7, 27
*Elset, elset=_Insertschaftklebeflaeche_S5, internal, instance=Deckel-1
  1,  6,  7, 27
*Elset, elset=_Insertschaftklebeflaeche_S3, internal, instance=Boden-1
  4, 24, 25, 28
*Elset, elset=_Insertschaftklebeflaeche_S3, internal, instance=Deckel-1
  4, 24, 25, 28
*Elset, elset=_Insertschaftklebeflaeche_S6, internal, instance=Boden-1
 29, 30
*Elset, elset=_Insertschaftklebeflaeche_S6, internal, instance=Deckel-1
 29, 30
*Elset, elset=_Insertschaftklebeflaeche_S2, internal, instance=Hantel-1, generate
  1,  50,   1
*Surface, type=ELEMENT, name=Insertschaftklebeflaeche
_Insertschaftklebeflaeche_S5, S5
_Insertschaftklebeflaeche_S3, S3
_Insertschaftklebeflaeche_S6, S6
_Insertschaftklebeflaeche_S2, S2
*Elset, elset=__PickedSurf24_S2, internal, instance=Insert-1, generate
 84,  92,   1
*Surface, type=ELEMENT, name=_PickedSurf24, internal
__PickedSurf24_S2, S2
** Constraint: CP-1-Insert-1-Boden-1
*Tie, name=CP-1-Insert-1-Boden-1, adjust=yes, type=SURFACE TO SURFACE
CP-1-Boden-1, CP-1-Insert-1
** Constraint: CP-3-Insert-1-Hantel-1
*Tie, name=CP-3-Insert-1-Hantel-1, adjust=yes, type=SURFACE TO SURFACE
CP-3-Hantel-1, CP-3-Insert-1
** Constraint: CP-4-Insert-1-Deckel-1
*Tie, name=CP-4-Insert-1-Deckel-1, adjust=yes, type=SURFACE TO SURFACE
CP-4-Deckel-1, CP-4-Insert-1
** Constraint: CP-5-Boden-1-Hantel-1
*Tie, name=CP-5-Boden-1-Hantel-1, adjust=yes, type=SURFACE TO SURFACE
CP-5-Hantel-1, CP-5-Boden-1
** Constraint: CP-8-Deckel-1-Hantel-1
*Tie, name=CP-8-Deckel-1-Hantel-1, adjust=yes, type=SURFACE TO SURFACE
CP-8-Hantel-1, CP-8-Deckel-1
** Constraint: Coupling_Referenzpunkt
*Coupling, constraint name=Coupling_Referenzpunkt, ref node=_PickedSet30, surface=_PickedSurf24
*Kinematic
** Constraint: TIE_Hantel_Boden
*Tie, name=TIE_Hantel_Boden, adjust=yes
Boden-1.Oben, Hantel-1.Alles
** Constraint: TIE_Hantel_Deckel
*Tie, name=TIE_Hantel_Deckel, adjust=yes
Deckel-1.Unten, Hantel-1.Alles
** Constraint: TIE_Insertschaft
*Tie, name=TIE_Insertschaft, adjust=yes
Insertschaftklebeflaeche, Insert-1.Stiel
*Elset, elset=__CP-6-Schaum-1-Boden-1_msm_1_S5, internal, instance=Schaum-1
  1, 14, 16, 17, 30, 32, 33, 46, 48, 49, 62, 64, 65, 78, 80
*Elset, elset=__CP-6-Schaum-1-Boden-1_msm_1_S6, internal, instance=Schaum-1
  2,  3, 10, 18, 19, 26, 34, 35, 42, 50, 51, 58, 66, 67, 74
*Elset, elset=__CP-6-Schaum-1-Boden-1_msm_1_S4, internal, instance=Schaum-1, generate
  6,  70,  16
*Elset, elset=__CP-6-Schaum-1-Boden-1_msm_1_S3, internal, instance=Schaum-1
  7, 11, 12, 23, 27, 28, 39, 43, 44, 55, 59, 60, 71, 75, 76
*Surface, type=ELEMENT, name=_CP-6-Schaum-1-Boden-1_msm_1, internal
__CP-6-Schaum-1-Boden-1_msm_1_S5, S5
__CP-6-Schaum-1-Boden-1_msm_1_S6, S6
__CP-6-Schaum-1-Boden-1_msm_1_S4, S4
__CP-6-Schaum-1-Boden-1_msm_1_S3, S3
*Elset, elset=__CP-7-Schaum-1-Hantel-1_msm_1_S5, internal, instance=Schaum-1
  1, 14, 16, 17, 30, 32, 33, 46, 48, 49, 62, 64, 65, 78, 80
*Elset, elset=__CP-7-Schaum-1-Hantel-1_msm_1_S6, internal, instance=Schaum-1
  2,  3, 10, 18, 19, 26, 34, 35, 42, 50, 51, 58, 66, 67, 74
*Elset, elset=__CP-7-Schaum-1-Hantel-1_msm_1_S4, internal, instance=Schaum-1, generate
  6,  70,  16
*Elset, elset=__CP-7-Schaum-1-Hantel-1_msm_1_S3, internal, instance=Schaum-1
  7, 11, 12, 23, 27, 28, 39, 43, 44, 55, 59, 60, 71, 75, 76
*Surface, type=ELEMENT, name=_CP-7-Schaum-1-Hantel-1_msm_1, internal
__CP-7-Schaum-1-Hantel-1_msm_1_S5, S5
__CP-7-Schaum-1-Hantel-1_msm_1_S6, S6
__CP-7-Schaum-1-Hantel-1_msm_1_S4, S4
__CP-7-Schaum-1-Hantel-1_msm_1_S3, S3
*Elset, elset=__CP-7-Schaum-1-Hantel-1_ssm_1_S1, internal, instance=Hantel-1, generate
 101,  150,    1
*Surface, type=ELEMENT, name=_CP-7-Schaum-1-Hantel-1_ssm_1, internal
__CP-7-Schaum-1-Hantel-1_ssm_1_S1, S1
*Elset, elset=__CP-9-Schaum-1-Deckel-1_msm_1_S5, internal, instance=Schaum-1
  1, 14, 16, 17, 30, 32, 33, 46, 48, 49, 62, 64, 65, 78, 80
*Elset, elset=__CP-9-Schaum-1-Deckel-1_msm_1_S6, internal, instance=Schaum-1
  2,  3, 10, 18, 19, 26, 34, 35, 42, 50, 51, 58, 66, 67, 74
*Elset, elset=__CP-9-Schaum-1-Deckel-1_msm_1_S4, internal, instance=Schaum-1, generate
  6,  70,  16
*Elset, elset=__CP-9-Schaum-1-Deckel-1_msm_1_S3, internal, instance=Schaum-1
  7, 11, 12, 23, 27, 28, 39, 43, 44, 55, 59, 60, 71, 75, 76
*Surface, type=ELEMENT, name=_CP-9-Schaum-1-Deckel-1_msm_1, internal
__CP-9-Schaum-1-Deckel-1_msm_1_S5, S5
__CP-9-Schaum-1-Deckel-1_msm_1_S6, S6
__CP-9-Schaum-1-Deckel-1_msm_1_S4, S4
__CP-9-Schaum-1-Deckel-1_msm_1_S3, S3
*End Assembly
*Amplitude, name=Smooth, definition=SMOOTH STEP
             0.,              0.,              4.,             40.
**
** MATERIALS
**
*Material, name=CFK
*Density
 1e-09,
*Elastic, type=LAMINA
120000.,8500., 0.35,4200.,4200.,2500.
*Material, name=Harz
*Elastic
2800., 0.3
*Material, name=Schaum
*Elastic
80., 0.35
*Material, name=Stahl
*Elastic
210000., 0.3
**
** INTERACTION PROPERTIES
**
*Surface Interaction, name=Gleitkontakt
1.,
*Friction, slip tolerance=0.005
 0.1,
*Surface Behavior, pressure-overclosure=HARD
*Surface Interaction, name=Klebeverbindung_Schaum
1.,
*Friction, slip tolerance=0.005
 0.3,
*Surface Behavior, pressure-overclosure=HARD
*Cohesive Behavior
500.,500.,500.
*Surface Interaction, name=Klebeverbindung_Stahl
1.,
*Surface Behavior, pressure-overclosure=HARD
*Cohesive Behavior
500.,500.,500.
*Damage Initiation, criterion=MAXS
1.,1.,1.
*Damage Evolution, type=ENERGY, softening=EXPONENTIAL, mixed mode behavior=BK, power=1.75
 0.03, 0.03, 0.03
*Damage Stabilization
1e-05
*Surface Smoothing, name=CP-6-Schaum-1-Boden-1
, _CP-6-Schaum-1-Boden-1_msm_1, TOROIDAL, 3.55271e-15, 32.7, 1.86517e-14, 3.55271e-15, 31.7, 1.8713e-14, 18.2016
*Surface Smoothing, name=CP-7-Schaum-1-Hantel-1
, _CP-7-Schaum-1-Hantel-1_msm_1, TOROIDAL, 3.55271e-15, 32.7, 1.86517e-14, 3.55271e-15, 31.7, 1.8713e-14, 18.2016
_CP-7-Schaum-1-Hantel-1_ssm_1, , TOROIDAL, -8.88178e-15, 32.7, 3.28281e-15, -8.88178e-15, 31.7, 3.28281e-15, 18.2016
*Surface Smoothing, name=CP-9-Schaum-1-Deckel-1
, _CP-9-Schaum-1-Deckel-1_msm_1, TOROIDAL, 3.55271e-15, 32.7, 1.86517e-14, 3.55271e-15, 31.7, 1.8713e-14, 18.2016
**
** BOUNDARY CONDITIONS
**
** Name: FIX Type: Symmetry/Antisymmetry/Encastre
*Boundary
_PickedSet26, ENCASTRE
** Name: XSYMM Type: Symmetry/Antisymmetry/Encastre
*Boundary
XSYMM, XSYMM
** Name: ZSYMM Type: Symmetry/Antisymmetry/Encastre
*Boundary
YSYMM, ZSYMM
**
** INTERACTIONS
**
** Interaction: CP-2-Boden-1-Insert-1
*Contact Pair, interaction=Klebeverbindung_Schaum, small sliding, type=SURFACE TO SURFACE
CP-2-Insert-1, CP-2-Boden-1
** Interaction: CP-6-Schaum-1-Boden-1
*Contact Pair, interaction=Klebeverbindung_Schaum, small sliding, type=SURFACE TO SURFACE,
geometric correction=CP-6-Schaum-1-Boden-1
CP-6-Boden-1, CP-6-Schaum-1
** Interaction: CP-7-Schaum-1-Hantel-1
*Contact Pair, interaction=Klebeverbindung_Schaum, small sliding, type=SURFACE TO SURFACE,
geometric correction=CP-7-Schaum-1-Hantel-1
CP-7-Hantel-1, CP-7-Schaum-1
** Interaction: CP-9-Schaum-1-Deckel-1
*Contact Pair, interaction=Klebeverbindung_Schaum, small sliding, type=SURFACE TO SURFACE,
geometric correction=CP-9-Schaum-1-Deckel-1
CP-9-Deckel-1, CP-9-Schaum-1
** Interaction: CP-10-Niederhalter-1-Deckel-1
*Contact Pair, interaction=Gleitkontakt, type=SURFACE TO SURFACE
CP-10-Deckel-1, CP-10-Niederhalter-1
** ----------------------------------------------------------------
**
** STEP: Belastung
**
*Step, name=Belastung, nlgeom=YES
*Static
1., 1., 1e-05, 1.
**
** BOUNDARY CONDITIONS
**
** Name: Verschiebung Type: Displacement/Rotation
*Boundary
_PickedSet31, 2, 2, 5.
**
** OUTPUT REQUESTS
**
*Restart, write, number interval=1, time marks=NO
**
** FIELD OUTPUT: Alles
**
*Output, field, number interval=400, time marks=NO
*Node Output
U,
*Element Output, directions=YES
E, PE, PEEQ, S, SDEG, STATUS
*Contact Output
CSDMG, CSTRESS
**
** FIELD OUTPUT: Boden
**
*Element Output, elset=Boden-1.Deckschicht-1, directions=YES
2, 5, 8, 11, 14, 17, 20, 23
DAMAGEFC, DAMAGEFT, DAMAGEMC, DAMAGEMT, DAMAGESHR, S
**
** FIELD OUTPUT: Deckel
**
*Element Output, elset=Deckel-1.Deckschicht-1, directions=YES
2, 5, 8, 11, 14, 17, 20, 23
DAMAGEFC, DAMAGEFT, DAMAGEMC, DAMAGEMT, DAMAGESHR, S
**
** HISTORY OUTPUT: Alles
**
*Output, history, number interval=400, time marks=NO
*Energy Output
ALLAE, ALLIE, ALLKE, ETOTAL
**
** HISTORY OUTPUT: Referenzpunkt
**
*Node Output, nset=Insert-1.Referenzpunkt
RF2, U2
*End Step
