*Heading
** Job name: Biegebalken Model name: Biegebalken
** Generated by: Abaqus/CAE 6.14-5
*Preprint, echo=NO, model=NO, history=NO, contact=NO
**
** PARTS
**
*Part, name=Balken
*Node
      1,           0.,          20.,         200.
      2,           0.,          15.,         200.
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*Element, type=C3D8
  1,  206,  207,  212,  211,    1,    2,    7,    6
  2,  207,  208,  213,  212,    2,    3,    8,    7
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*Nset, nset=Set-1, generate
    1,  1435,     1
*Elset, elset=Set-1, generate
   1,  960,    1
** Section: All
*Solid Section, elset=Set-1, material=Stahl
,
*End Part
**
**
** ASSEMBLY
**
*Assembly, name=Assembly
**
*Instance, name=Balken-1, part=Balken
*End Instance
**
*Nset, nset=Set-1, instance=Balken-1
    1,    2,    3,    4,    5,  206
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*Elset, elset=Set-1, instance=Balken-1
   1,   2,   3,   4, 161, 162
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*Nset, nset=Set-2, instance=Balken-1
  201,  202,  203,  204,  205,  406
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*Elset, elset=Set-2, instance=Balken-1
 157, 158, 159, 160, 317, 318
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*End Assembly
**
** MATERIALS
**
*Material, name=Stahl
*Elastic
210000., 0.3
** ----------------------------------------------------------------
**
** STEP: Verschiebung
**
*Step, name=Verschiebung, nlgeom=NO
*Static
1., 1., 1e-05, 1.
**
** BOUNDARY CONDITIONS
**
** Name: Fix Type: Symmetry/Antisymmetry/Encastre
*Boundary
Set-1, ENCASTRE
** Name: Versch Type: Displacement/Rotation
*Boundary
Set-2, 2, 2, -0.5
**
** OUTPUT REQUESTS
**
*Restart, write, frequency=0
**
** FIELD OUTPUT: F-Output-1
**
*Output, field
*Node Output
CF, RF, U
*Element Output, directions=YES
LE, PE, PEEQ, PEMAG, S
**
** HISTORY OUTPUT: H-Output-1
**
*Output, history, variable=PRESELECT
*End Step
